// COMSOL Multiphysics 6.1.0.346 model "different_velocities.mph"
// Outline of the model tree

Functions
  an1: Analytic | expr = particle_id; args = particle_id; fununit = m/s; argunit = 1

Geometry
  geom1 "Geometry 1" (2D, length unit m)
    r1: Rectangle | size = {1, 1}
    fin: Finalize "Form Union"
  pgeom_cpt "Geometry" (1D, length unit m)
    pt1: Point

Physics
  cpt: ChargedParticleTracing on all domains
    dependent variable q = {qx, qy, qz}
    MaximumSecondary.MaximumSecondary = 5
    wall1: Wall (default)
    pp1: ParticleProperties
      SpecifyHamiltonian = Directly
      ParticleSpecies = UserDefined
      mp = me_const
      mprest = me_const
      Z = -1
    inl1: Inlet on boundaries 1 | InitialPosition = Density; N = 5; v0 = {1, 0, 0}
    wall2: Wall on boundaries 4
      sem1: SecondaryEmission on all boundaries | InitialVelocity = UserDefined; v0 = {-0.1*an1(cpt.pidx), 0.05, 0}

Mesh
  mesh1 "Mesh 1" (physics-controlled)

Studies
  std1 "Study 1"
    time: Transient "Time Dependent" | tlist = range(0,0.1,2)

Solver configurations
  sol1 "Solution 1" (study std1)
    v1: Variables "Dependent Variables 1"
    t1: Time "Time-Dependent Solver 1"
      tlist = range(0,0.1,2)
      rtol = 1.0E-5
      timemethod = genalpha
      estrat = exclude
      tstepsgenalpha = strict
      fc1: FullyCoupled | linsolver = i1; ntolfact = 0.1
      i1: Iterative
        ja1: Jacobi

Datasets
  dset1: Solution | solution = sol1
  part1: Particle
    solution = sol1
    pgeomspec = fromphysics
    pgeom = pgeom_cpt
    posdof = {comp1.qx, comp1.qy}
    physicsinterface = cpt

Plots
  pg1: PlotGroup2D "Particle Trajectories (cpt)" | data = part1
    traj1: ParticleTrajectories | pointtype = point
      col1: Color "Color Expression 1" | expr = cpt.pidx