// COMSOL Multiphysics 6.1.0.357 model "particle.mph"
// Outline of the model tree

Parameters
  diam = 10[um]  // Diameter of a microchannel
  a = 42  // Lenght to diameter ratio
  T0 = 1[keV]  // Initial energy of an electron/pic particle
  v0 = sqrt(2*T0/(me_const*pic_n))  // Initial speed calculated from T0
  fly_time = len/v0  // Time needed for particle with speed v0 to travel distance len
  step = fly_time/100  // (Not used)
  len = 1.5[mm]  // Length of microchannel
  U = 2.4[kV]  // Bias voltage
  pic_n = 50  // Number of electrons in one PIC particle
  Um = 1100  // First crossover voltage
  d = round(sqrt(U/Um))  // Number of secondary electrons released from one colision

Functions
  an1: Analytic | funcname = Qw; expr = (1.0432e-7 - 1.24869e-10*exp(8657.03*y - 3.69327))*t; args = {y, t}; argunit = {m, s}

Geometry
  geom1 "Geometry 1" (3D, length unit m)
    cyl1: Cylinder | axistype = y; r = diam/2; h = len
    fin: Finalize "Form Union"
  pgeom_cpt "Geometry" (1D, length unit m)
    pt1: Point

Physics
  cpt: ChargedParticleTracing on all domains
    dependent variable q = {qx, qy, qz}
    MaximumSecondary.MaximumSecondary = 2147483647
    StoreParticleStatusData.StoreParticleStatusData = 0
    StoreParticleReleaseStatistics.StoreParticleReleaseStatistics = 0
    RandomNumberArgs.RandomNumberArgs = GenerateRandom
    wall1: Wall (default) | WallCondition = Bounce; PrimaryParticleCondition = NoneCondition
      sem1: SecondaryEmission on all boundaries
        ActivateOnWallConditions = All
        SecondaryEmissionCondition = NoneCondition
        Ns = min(2, round(Qw(qy,t)/e_const/pic_n))
        InitialVelocity = IsotropicHemisphere
        SpecifyTangentialNormal = 0
        SecondaryParticleSpeed = ScaledByNumberOfSecondaryParticles
        Vs = v0
    pp1: ParticleProperties "pic_n electrons" | ParticleSpecies = UserDefined; mp = pic_n*me_const; Z = -pic_n
    ef1: ElectricForce on all domains | SpecifyForceUsing = ElectricField; E = {0, -U/len, 0}
    inl1: Inlet on boundaries 3
      InitialPosition = RandomPosition
      InitialVelocity = KineticEnergyAndDirection
      SamplingFromDistribution = Random
      Us = v0
      Nvel = 1
      rax = {0, 1, 0}
      L0 = {0, 1, 0}
      Ep0 = T0
    out1: Outlet on boundaries 4 | WallCondition = Disappear
    pcnt1: ParticleCounter (disabled) on boundaries 4

Mesh
  mesh1 "Mesh 1" (physics-controlled)
    size: MeshSizeDefault | hauto = 4

Studies
  std1 "Study 1"
    time: Transient "Time Dependent" | tlist = range(0,(2*fly_time-0)/399,2*fly_time)

Solver configurations
  sol1 "Solution 1" (study std1)
    v1: Variables "Dependent Variables 1"
    t1: Time "Time-Dependent Solver 1"
      tlist = range(0,(2*fly_time-0)/399,2*fly_time)
      rtol = 1.0E-5
      timemethod = genalpha
      estrat = exclude
      tstepsgenalpha = strict
      fc1: FullyCoupled | linsolver = i1; ntolfact = 0.1
      i1: Iterative
        ja1: Jacobi

Datasets
  dset1: Solution | solution = sol1
  part1: Particle
    solution = sol1
    pgeomspec = fromphysics
    pgeom = pgeom_cpt
    posdof = {comp1.qx, comp1.qy, comp1.qz}
    physicsinterface = cpt

Derived values
  par1: Particle "vx" | data = part1; table = tbl1; expr = cpt.vx; descr = Particle velocity, x-component
  par2: Particle "vy" | data = part1; table = tbl1; expr = cpt.vy
  par3: Particle "vz" | data = part1; table = tbl1; expr = cpt.vz

Tables
  tbl1: Table
    // vx
    Time (s) | Particle velocity, x-component, Particle 1 (m/s) | Particle velocity, y-component, Particle 1 (m/s) | Particle velocity, z-component, Particle 1 (m/s) | Particle velocity, x-component, Particle 1 (m/s) | Particle velocity, y-component, Particle 1 (m/s) | Particle velocity, z-component, Particle 1 (m/s)
    0 | 1.87554e+07 | 0 | 0 | 0 | 1.87554e+07 | 0
    1.7096e-13 | 1.87554e+07 | 37435.9 | 0 | 0 | 1.87928e+07 | 0
    3.41919e-13 | 1.87554e+07 | 74975.2 | 0 | 0 | 1.88303e+07 | 0
    5.12879e-13 | 1.87554e+07 | 112580 | 0 | 0 | 1.8868e+07 | 0
    6.83839e-13 | 1.87554e+07 | 150158 | 0 | 0 | 1.89055e+07 | 0
    8.54798e-13 | 1.87554e+07 | 187747 | 0 | 0 | 1.89431e+07 | 0
    1.02576e-12 | -6.51867e+06 | 101890 | 1.7587e+07 | 0 | 1.89807e+07 | 0
    1.19672e-12 | -6.51867e+06 | 139477 | 1.7587e+07 | 0 | 1.90183e+07 | 0
    1.36768e-12 | -6.51867e+06 | 177062 | 1.7587e+07 | 0 | 1.90559e+07 | 0
    1.53864e-12 | -6.51867e+06 | 214648 | 1.7587e+07 | 0 | 1.90935e+07 | 0
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
Plots
  pg1: PlotGroup3D "Particle Trajectories (cpt)" | data = part1
    traj1: ParticleTrajectories | linetype = none; pointtype = point
      col1: Color "Color Expression 1" | expr = cpt.V

Exports
  tbl1: Table | table = tbl1; filename = /home/jakub/Dokumenty/comsol/table.txt
  anim1: Animation | target = player; framesel = all; maxframes = 500
  anim2: Animation
    movietype = webm
    webmfilename = /home/jakub/cernbox/Documents/diplomovka/simulácie/comsol/separate-electrons-full-gain2.webm
    webmlossless = on
    framesel = all
    width = 1920
    height = 1080