// COMSOL Multiphysics 6.1.0.357 model "particle-pivi1e4-biased_field.mph"
// Outline of the model tree

Parameters
  diam = 10[um]
  a = 42
  T0 = 1[keV]
  v0 = sqrt(2*T0/(me_const*pic_n))
  fly_time = len/v0
  len = a*diam
  U = 2.4[kV]
  pic_n = 1
  k = 1.16e4[1/m]
  V = 2e3[V]
  C = 2.86e-13[F]
  R = 1e-5[ohm]
  maxSecondaries = 10000  // Maximum number of decondary particles
  alpha = 15[°]  // bias angle between the channel axis and the electric field

Functions
  an1: Analytic | funcname = Qw; expr = (1.51998e-7 - 1.6424e-9*exp(0.392508*y*k - 0.352646))*t; args = {y, t}; argunit = {m, s}
  extm1: MATLAB "Wall charging (MATLAB)" (disabled) | funcs = {{NwInit, C,V,q}, {NwUpdate, dN,t}, {Coll, E}}
  ext1: External "C functions"
    path = /home/jakub/cernbox/Documents/diplomovka/simulácie/comsol/tests/c_functions/build/libcfunc.so
    funcs = 
      {chargeWall, dNodt, dt}
      {initWallCharge, C,V,q}
      {initPiviArrays, maxParticles}
      {shouldBeRemoved, pidx}
      {initSpeed, pidx,mass}
      {pivi, Ek,theta,pidx}
      {shouldBeReinitialized, pidx}
      {reinitializeVelocity, pidx,mass,component}
    init = /home/jakub/pivi_params.txt

Common definitions
  state1: StateVariables "Wall charge"
    state = Nw
    initialValue = initWallCharge(C,V,e_const)
    updateExpression = chargeWall(V/R/e_const, timestep)
  state2: StateVariables "Initializations"
    state = initPiviArraysResult
    initialValue = initPiviArrays(maxSecondaries)
    description = Allocate memory for internal helper arrays
    update = onlyInitialization

Geometry
  geom1 "Geometry 1" (3D, length unit m)
    cyl1: Cylinder | axistype = y; r = diam/2; h = len
    fin: Finalize "Form Union"
  pgeom_cpt "Geometry" (1D, length unit m)
    pt1: Point

Physics
  cpt: ChargedParticleTracing on all domains
    dependent variable q = {qx, qy, qz}
    MaximumSecondary.MaximumSecondary = maxSecondaries
    StoreParticleStatusData.StoreParticleStatusData = 0
    StoreParticleReleaseStatistics.StoreParticleReleaseStatistics = 0
    RandomNumberArgs.RandomNumberArgs = GenerateRandom
    wall1: Wall (default) | WallCondition = IsotropicScattering; PrimaryParticleCondition = NoneCondition
      sem1: SecondaryEmission on all boundaries
        ActivateOnWallConditions = All
        SecondaryEmissionCondition = NoneCondition
        Ns = pivi(cpt.Ep/e_const,cpt.phii,cpt.pidx)
        InitialVelocity = IsotropicHemisphere
        SpecifyTangentialNormal = 0
        SecondaryParticleSpeed = UserDefined
        Vs = initSpeed(cpt.pidx, cpt.mp)
    pp1: ParticleProperties "Electron" | ParticleSpecies = Electron; mp = pic_n*me_const; Z = -pic_n
    ef1: ElectricForce on all domains | SpecifyForceUsing = ElectricField; E = {0, -U/len*cos(alpha), -sin(alpha)}
    inl1: Inlet on boundaries 3
      rt = 0
      InitialPosition = RandomPosition
      N = 1
      InitialVelocity = ConstantSpeedHemisphere
      SamplingFromDistribution = Random
      Us = v0
      Nvel = 1
      rax = {0, 1, 0}
      L0 = {0, 1, 0}
      Ep0 = T0
    out1: Outlet on boundaries 4 | WallCondition = Disappear
    vre1: VelocityReinitialization "Remove particle" on all domains
      ev = shouldBeRemoved(cpt.pidx)
      EffectOnPrimaryParticle = Disappear
    vre2: VelocityReinitialization "Velocity Reinitialization after collision" on all domains
      ev = shouldBeReinitialized(cpt.pidx)
      vr = {reinitializeVelocity(cpt.pidx,cpt.mp,1), reinitializeVelocity(cpt.pidx,cpt.mp,2), reinitializeVelocity(cpt.pidx,cpt.mp,3)}

Mesh
  mesh1 "Mesh 1" (physics-controlled)
    size: MeshSizeDefault | hauto = 4

Studies
  std1 "Study 1"
    time: Transient "Time Dependent" | tlist = range(0,(10*fly_time-0)/999,10*fly_time)

Solver configurations
  sol1 "Solution 1" (study std1)
    v1: Variables "Dependent Variables 1"
    t1: Time "Time-Dependent Solver 1"
      tlist = range(0,(10*fly_time-0)/999,10*fly_time)
      tout = tsteps
      rtol = 1.0E-5
      timemethod = genalpha
      estrat = exclude
      tstepsgenalpha = strict
      timestepgenalpha = 3e-13[s]
      fc1: FullyCoupled | linsolver = i1; ntolfact = 0.1
      i1: Iterative
        ja1: Jacobi

Datasets
  dset1: Solution | solution = sol1
  part1: Particle
    solution = sol1
    pgeomspec = fromphysics
    pgeom = pgeom_cpt
    posdof = {comp1.qx, comp1.qy, comp1.qz}
    physicsinterface = cpt

Derived values
  gev1: EvalGlobal "Global Evaluation 1" | data = part1; table = tbl3; expr = e_const; unit = C; descr = Elementary charge
  par1: Particle "Particle Evaluation 1" | data = part1; table = tbl2; expr = notAFunc(cpt.mp)

Plots
  pg1: PlotGroup3D "Particle Trajectories (cpt)" | data = part1
    traj1: ParticleTrajectories
      col1: Color "Color Expression 1" | expr = cpt.V
  pg2: PlotGroup3D "3D Plot Group 2" | data = none
    arwv1: ArrowVolume | data = dset1; expr = {cpt.ef1.Fex, cpt.ef1.Fey, cpt.ef1.Fez}; descr = Electric force

Exports
  anim1: Animation | movietype = webm; webmfilename = /auto/plzen1/home/buckojak/Untitled.webm; framesel = all; size = hd
  data1: Data
    data = part1
    expr = {cpt.V, qx, qy, qz, cpt.vx, cpt.vy, cpt.vz}
    unit = {m/s, m, m, m, m/s, m/s, m/s}
    descr = {Particle velocity magnitude, "Particle position, x-component", "Particle position, y-component", "Particle position, z-component", "Particle velocity, x-component", "Particle velocity, y-component", "Particle velocity, z-component"}
    filename = /home/jakub/cernbox/Documents/diplomovka/simulácie/comsol/pivi/particle-pivi-1e4-biased_field_15deg-all.txt
    transpose = on